// SBML level 2 version 1

model Calcium()

  // Compartments:
  compartment World;

  // Species:
  species Ca in World;
  species n in World;
  species p in World;

  // Parameters:
  diffc = 20;
  diffp = 0;
  nmax = 1000;
  beta = 0.02;
  kp = 0;
  omega = 5e-7;
  na = 6.02214e23;
  gamma = 2;
  kgamma = 0.1;
  kflux = 8.1;
  b = 0.111;
  v1 = 0.889;
  k1 = 0.7;
  mu0 = 0.567;
  mu1 = 0.433;
  kmu = 4;
  taun = 2;
  k2 = 0.7;

  // Reactions:
  LeakCurrent: -> Ca; beta*0.001*na*(PhysicalCellWidth*omega)^3;
  SercaPump: Ca -> ; gamma*0.001*na*(PhysicalCellWidth*omega)^3*Ca/(kgamma*0.001*na*(PhysicalCellWidth*omega)^3 + Ca);
  IPRFlux: -> Ca; kflux/nmax*0.001*na*(PhysicalCellWidth*omega)^3*(b + v1*Ca/(k1*0.001*na*(PhysicalCellWidth*omega)^3 + Ca))*n*(mu0 + mu1*p/(kmu*0.001*na*(PhysicalCellWidth*omega)^3 + p));
  ChannelCreation: -> n; nmax/taun*(1 - Ca*(Ca - 1)/(k2*0.001*na*(PhysicalCellWidth*omega)^3*k2*0.001*na*(PhysicalCellWidth*omega)^3 + Ca*(Ca - 1)));
  ChannelAnnihilation: n -> ; n/taun;
  IP3Decay: p -> ; kp*p;
end
