// SBML level 2 version 1

model Oregonator()

  // Compartments:
  compartment World;

  // Species:
  species X in World;
  species Y in World;
  species Z in World;
  species YS in World;
  species YSS in World;
  species R in World;

  // Parameters:
  D = 1.5e-5;
  k1 = 843.2;
  k2 = 1.045e-9;
  k3 = 4.216;
  k4 = 5.22e-15;
  k5 = 0.048;
  k6 = 100;
  k7 = 100;
  Omega = 8e-12;

  // Reactions:
  Reaction1: Y -> X + R; k1*Y;
  Reaction2: X + Y -> 2 R; k2/Omega*X*Y;
  Reaction3: X -> 2 X + 2 Z; k3*X;
  Reaction4: 2 X -> R; k4/Omega*X*(X - 1);
  Reaction5: Z -> YS + YSS; k5*Z;
  Reaction6: 2 YS -> Y; YS*(YS - 1);
  Reaction7: 2 YSS -> YS; YSS*(YSS - 1);
end
