// SBML level 2 version 1

model AB_Reaction_Individual()

  // Compartments:
  compartment World;

  // Species:
  species SpeciesA in World;
  species SpeciesB in World;
  species SpeciesAC in World;
  species SpeciesBC in World;

  // Parameters:
  k1 = 0.001;
  k2 = 0.01;
  k3 = 1.2;
  k4 = 1;

  // Reactions:
  AAAnnihilation: 2 SpeciesA -> ; k1*SpeciesA*(SpeciesA - 1); AAAnnihilation is "AA Annihilation";
  ABAnnihilation: SpeciesA + SpeciesB -> ; k2*SpeciesA*SpeciesB; ABAnnihilation is "AB Annihilation";
  ACreation: -> SpeciesA; k3; ACreation is "A Creation";
  BCreation: -> SpeciesB; k4; BCreation is "B Creation";
  ACAACnnihilation: 2 SpeciesAC -> ; k1*SpeciesAC*(SpeciesAC - 1); ACAACnnihilation is "ACAC Annihilation";
  ACBCAnnihilation: SpeciesAC + SpeciesBC -> ; k2*SpeciesAC*SpeciesBC; ACBCAnnihilation is "ACBC Annihilation";
  ACCreation: -> SpeciesAC; k3; ACCreation is "AC Creation";
  BCCreation: -> SpeciesBC; k4; BCCreation is "BC Creation";
end
